# Parâmetros dos MOSFETs
pVth := -1.0652 V
epsrox := 3.9
nVth := 0.49439 V
pU0 := 24.424*cm^2/(V*s)
nU0 := 301.97*cm^2/(V*s)
eps0 := 8.8541*10^-12*F/m
ptox := 4.23*10^-9*m
ntox := 4.148*10^-9*m
Coxn := eps0*epsrox/ntox = 0.00832473 F/m^2
Voutmax := 1.6 V
Coxp := eps0*epsrox/ptox = 0.00816335 F/m^2
# Parâmetros do projeto
Av := 100
Voutmin := 0.2 V
out_swing := Voutmax - Voutmin = 1.4 V
Vdd := Voutmax + Voutmin = 1.8 V
Cap := 7 pF
freq := 80 MHz
Ro1 := 1.008 kΩ
fpole := freq/Av = 800 kHz
Ro2 := 307.721 kΩ
Rout := 1/(2*π*fpole*Cap) = 28.4205 kΩ
x := (Ro1*Ro2)/(Ro1 + Ro2) = 1004.71 Ω
λn := 0.038052*1/V
λp := 0.069696*1/V
Ibias := 1/((λn + λp)*Rout) = 326.557 μA
Vdssat2 := Vdd - Voutmax = 0.2 V
Vin := Voutmax/Av = 0.016 V
WL2 := 2*Ibias/(pU0*Coxp*Vdssat2^2) = 818.923
Vgs1 := Voutmin + nVth = 0.69439 V
gm1 := Av/Rout = 3.51858 mA/V
WL1 := gm1/(nU0*Coxn*(Vgs1 - nVth)) = 69.9848
